#package gpu force/neigh ${GPU} ${GPU} 1.0

# ----------------------------------
## READ_RESTART
# ----------------------------------
read_restart ${read_res}

# ----------------- Init Section -----------------
#units real
#atom_style full

pair_style hybrid/overlay morse 10.000000 coul/long 10.000000
pair_coeff 1 1 morse 0.007837 2.044577 3.759800 10.000000
pair_coeff 1 2 morse 2.032808 2.651781 1.628000 10.000000
pair_coeff 2 2 morse 0.023701 1.373147 3.791000 10.000000
pair_coeff * * coul/long

kspace_style pppm 0.0001
pair_modify shift yes
neigh_modify every 1 check yes

if "${run_phase} == 1" then "reset_timestep 0"

# ----------------------------------
## Saving Frequency (50 frames)
# ----------------------------------
variable ts_save equal floor(${steps_equ}*0.02)

# ----------------------------------
## DUMP
# ----------------------------------
dump 1 all xyz ${ts_save} ./equilibration/trajectory/trajectory_${usic}_${trial}_${namestring}_T${Temp}.equ.xyz
dump_modify 1 append yes

# ----------------------------------
## CHECKPOINT
# ----------------------------------
if "${set_CheckPoint} == 1" then "restart ${restartf} ./equilibration/restart/restart_${usic}_${trial}_${namestring}_T${Temp}.equ.restart"

# ----------------------------------
## FIX
# ----------------------------------
fix 1 all momentum 1000 linear 1 1 1 angular

variable T equal ${Temp}/1000.0

fix 2 all npt temp ${T} ${T} 0.1 iso 1.0 1.0 1.0

# ----------------------------------
## THERMO_STYLE
# ----------------------------------
thermo_style custom step temp press pe ke etotal ebond eangle epair lx ly lz vol density dt time cpu tpcpu spcpu cpuremain

# ----------------------------------
## RUN_STYLE
# ----------------------------------
run_style verlet

# ----------------------------------
## EQUILIBRATION RUN
# ----------------------------------
timestep ${ts}
thermo ${ts_save}
run ${steps_equ}
# ----------------------------------

# ----------------------------------
## WRITE_RESTART
# ----------------------------------
write_restart ${write_res}
